*Heading
** Job name: Job-eq_BendX Model name: eq_BendX
** Generated by: Abaqus/CAE 2022
*Preprint, echo=NO, model=NO, history=NO, contact=NO
**
** PARTS
**
*Part, name=Part-1
*Node
1,           0.,           0.,           0.
2,   6.15384626,           0.,           0.
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*User element, nodes=8, type=U1001, coordinates=3, variables=1
1,2,3,4,5,11,12
*Element, type=U1001
1,   1,   2,  16,  15, 197, 198, 199, 200
2,   2,   3,  17,  16, 201, 202, 203, 198
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*Element, type=S8RT,elset=dummy
170,1,2,16,15,197,198,199,200
171,2,3,17,16,201,202,203,198
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*Nset, nset=_PickedSet2, internal, generate
1,  560,    1
*Elset, elset=_PickedSet2, internal, generate
1,  169,    1
*Uel property, elset=_PickedSet2
1.,0.,0.,0.,0.,1.
*Shell Section, elset=dummy, material=dummy_mat
1.0e-10,5
*End Part
**
**
** ASSEMBLY
**
*Assembly, name=Assembly
**
*Instance, name=Part-1-1, part=Part-1
*End Instance
**
*Node
1,           0.,          40.,           0.
*Node
2,          80.,          40.,           0.
*Nset, nset=Set-1, instance=Part-1-1
1,  15,  29,  43,  57,  71
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*Nset, nset=Set-2, instance=Part-1-1
14,  28,  42,  56,  70,  84
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*Nset, nset=m_Set-rp1
1,
*Nset, nset=m_Set-rp2
2,
*Surface, type=NODE, name=Set-1_CNS_, internal
Set-1, 1.
*Surface, type=NODE, name=Set-2_CNS_, internal
Set-2, 1.
** Constraint: Constraint-1
*Coupling, constraint name=Constraint-1, ref node=m_Set-rp1, surface=Set-1_CNS_
*Kinematic
** Constraint: Constraint-2
*Coupling, constraint name=Constraint-2, ref node=m_Set-rp2, surface=Set-2_CNS_
*Kinematic
*End Assembly
*Material, name=dummy_mat
*Conductivity
 0.,
*Elastic
1e-16,0.3
** ----------------------------------------------------------------
**
** STEP: Step-1
**
*Step, name=Step-1, nlgeom=NO
*Coupled Temperature-displacement, creep=none, steady state
1., 1., 1e-05, 1.
**
** BOUNDARY CONDITIONS
**
** Name: BC-1 Type: Displacement/Rotation
*Boundary
m_Set-rp1, 1, 1
m_Set-rp1, 2, 2
m_Set-rp1, 3, 3
m_Set-rp1, 4, 4
m_Set-rp1, 5, 5
m_Set-rp1, 6, 6
**
** LOADS
**
** Name: Load-1   Type: Moment
*Cload
m_Set-rp2, 5, -100.
**
** OUTPUT REQUESTS
**
*Restart, write, frequency=0
**
** FIELD OUTPUT: F-Output-1
**
*Output, field, variable=PRESELECT
*Element Output, directions=YES
TEMP
*Node Output
NT
**
** HISTORY OUTPUT: H-Output-1
**
*Output, history
*Node Output, nset=m_Set-rp2
U1, U2, U3, UR1, UR2, UR3
*End Step
